<?xml version="1.0" encoding="UTF-8"?>

<!--
 cap10b-set.xml  - Cap10B by PAF team  - http://equipe-flightgear.forumactif.com

 Written by Flavien BLANC
 Modified by PAF team  - April 2012

 Copyright (C) 2011-2012  Flavien BLANC  - http://equipe-flightgear.forumactif.com/u56
 Copyright (C) 2012  Clément DE L'HAMAIDE  - http://equipe-flightgear.forumactif.com/u115


 This program is free software; you can redistribute it and/or
 modify it under the terms of the GNU General Public License as
 published by the Free Software Foundation; either version 2 of the
 License, or (at your option) any later version.

 This program is distributed in the hope that it will be useful, but
 WITHOUT ANY WARRANTY; without even the implied warranty of
 MERCHANTABILITY or FITNESS FOR A PARTICULAR PURPOSE.  See the GNU
 General Public License for more details.

 You should have received a copy of the GNU General Public License
 along with this program; if not see <http://www.gnu.org/licenses/>.


 Generated by Aero-Matic v 1.1

     Inputs:
                horsepower: 180.0
                     pitch: fixed
            max engine rpm: 2700
        prop diameter (ft): 5.9166666666667

     Outputs:
              max prop rpm: 3171.21
                gear ratio:    0.85
                       Cp0: 0.038888
                       Ct0: 0.054443
       static thrust (lbs):  474.84
-->

<propeller name="prop">
  <ixx>   2.47 </ixx>
  <diameter unit="IN">  71.0 </diameter>
  <numblades> 2 </numblades>
  <gearratio>  0.85 </gearratio>
  <p_factor>   5.61 </p_factor>

  <table name="C_THRUST" type="internal">
     <tableData>
       0.0   0.0593
       0.1   0.0569
       0.2   0.0544
       0.3   0.0501
       0.4   0.0450
       0.5   0.0396
       0.6   0.0321
       0.7   0.0243
       0.8   0.0132
       1.0  -0.0045
       1.2  -0.0234
       1.4  -0.0420
     </tableData>
  </table>


  <table name="C_POWER" type="internal">
     <tableData>
       0.0   0.0399
       0.1   0.0399
       0.2   0.0389
       0.3   0.0380
       0.4   0.0358
       0.5   0.0328
       0.6   0.0301
       0.7   0.0253
       0.8   0.0206
       1.0   0.0074
       1.2  -0.0118
       1.4  -0.0355
       1.6  -0.0602
     </tableData>
  </table>

<!-- thrust effects of helical tip Mach -->
<table name="CT_MACH" type="internal">
  <tableData>
    0.85   1.0
    1.05   0.8
  </tableData>
</table>

<!-- power-required effects of helical tip Mach -->
<table name="CP_MACH" type="internal">
  <tableData>
    0.85   1.0
    1.05   1.8
    2.00   1.4
  </tableData>
</table>

</propeller>
